E_M := 1296.3 MPa
E_F := 30000 MPa
φ_F := 0.86
E_S := E_M*((1 - 2*sqrt(φ_F/π)) - π/(2*(1 - E_M/E_F)) + 2/((1 - E_M/E_F)*sqrt(1 - 4*φ_F/π*(1 - E_M/E_F)^2))*atan(sqrt((1 + 2*sqrt(φ_F/π)*(1 - E_M/E_F))/(1 - 2*sqrt(φ_F/π)*(1 - E_M/E_F)))))
E_S = (-834.05 - 86850.6i) MPa
atan(sqrt((1 + 2*sqrt(φ_F/π)*(1 - E_M/E_F))/(1 - 2*sqrt(φ_F/π)*(1 - E_M/E_F)))) = 1.5708 + 0.0244941i
1 - 2*sqrt(φ_F/π)*(1 - E_M/E_F) = -0.00120017
